** Euler beam with five layers of elements to avoid volumetric locking
**
*Node
1,0,0
2,10,0
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*Element, type=CPS3
1,120,161,300
2,174,136,301
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*Material, NAME=STEEL,
*Elastic
210e9, 0.3
*Boundary, type=Displacement
 1,   1,   0.0
 1,   2,   0.0
 4,   1,   0.0
 4,   2,   0.0
107,  1,   0.0
107,  2,   0.0
108,  1,   0.0
108,  2,   0.0
109,  1,   0.0
109,  2,   0.0
110,  1,   0.0
110,  2,   0.0
*Boundary, type=Force
 2,   2,   -100.0
 3,   2,   -100.0
54,   2,   -100.0
55,   2,   -100.0
56,   2,   -100.0
57,   2,   -100.0
